ρ_sul := 1.8305*gm/mL
ρ_water := .9999*gm/mL
ρ_phs := 1.870*gm/mL
ρ_sol := 1.730*gm/mL
.35 < χ_p < .75
.1 < χ_sul < .5
χ_sul == 1 - χ_p - χ_w
χ_w == 1 - χ_sul - χ_p
χ_p*ρ_phs + χ_sul*ρ_sul + χ_w*ρ_water == ρ_sol
χ_p(χ_sul) := (ρ_sol - ρ_water - ρ_sul*χ_sul + χ_sul*ρ_water)/(ρ_phs - ρ_water)
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# this value comes from some digging in the SDS. (Percentage of components with unknown acute toxicity). It can only fit sulfuric
χ_sul := 26.7 %
χ_p(χ_sul) = 58.422 %
